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/batch
! ANSYS input file written by Workbench version 19.2 RELEASE
! File used for geometry attach: F:\Learning\6 семестр\КСКР\LAB_1\lab1_version1_files\dp0\CFX\DM\CFX.agdb
/title,lab1_version1--Static Structural (A5)
/com,--- Data in consistent MKS units. See Solving Units in the help system for more information.
/units,MKS
/prep7
! Turn off shape checking because checks already performed inside WB mesher.
! See help system for more information.
SHPP,OFF,,NOWARN
etcon,set             ! allow ANSYS to choose best KEYOP's for 180x elements
/com,*********** Nodes for the whole assembly ***********
nblock,3,,2257
(1i9,3e20.9e3)
        1     9.883117700E-06     2.000000000E-02     1.711806199E-05
        2     9.883117700E-06     2.500000000E-02     1.711806199E-05
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-1
/com,*********** Elements for Body 1 "Solid" ***********
et,1,187
eblock,19,solid,,1111
(19i9)
        1        1        1        1        0        0        0        0       10        0        4       45      202      281      146      409     1449      410      406
     1136     1137
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-1
/com,*********** Elements for Body 2 "Solid" ***********
et,2,186
keyo,2,2,1          ! set full integration on SOLID186
eblock,19,solid,,3
(19i9)
        2        2        2        2        0        0        0        0       20        0        1        1       14        9       10        2        8        7        3
       18       35       34       16       21       31       23       19       15       33       32       24
        2        2        2        2        0        0        0        0       20        0        2        1       12       13       14        2        5        6        8
       17       38       39       18       20       27       29       21       15       28       30       33
        2        2        2        2        0        0        0        0       20        0        3        1       10       11       12        2        3        4        5
       16       36       37       17       19       22       25       20       15       24       26       28
-1
/com,*********** Send User Defined Coordinate System(s) ***********
csys,0
toffst,273.15,  ! Temperature offset from absolute zero
/com,*********** Set Reference Temperature ***********
tref,22.
/com,*********** Send Materials ***********
Temperature = 'TEMP' ! Temperature
MP,DENS,1,7850,	! kg m^-3
MP,ALPX,1,1.2e-05,	! C^-1
MP,C,1,434,	! J kg^-1 C^-1
MP,KXX,1,60.5,	! W m^-1 C^-1
MP,RSVX,1,1.7e-07,	! kg m^3 A^-2 s^-3
MP,EX,1,200000000000,	! Pa
MP,NUXY,1,0.3,
MP,MURX,1,10000,

Temperature = 'TEMP' ! Temperature
MP,DENS,2,7850,	! kg m^-3
MP,ALPX,2,1.2e-05,	! C^-1
MP,C,2,434,	! J kg^-1 C^-1
MP,KXX,2,60.5,	! W m^-1 C^-1
MP,RSVX,2,1.7e-07,	! kg m^3 A^-2 s^-3
MP,EX,2,200000000000,	! Pa
MP,NUXY,2,0.3,
MP,MURX,2,10000,

!************************* Model Summary ********************
!Solid,	Structural Steel,	matid,	1
!Solid,	Structural Steel,	matid,	2
!************************* End Model Summary ********************
/com,*********** Create Contact "Contact Region" ***********
*set,tid,4
*set,cid,3
r,tid
r,cid
et,tid,170
et,cid,174
eblock,10,,,6
(15i9)
     1115        4        4        4        0      136      137      280      280     1095     1098      280     1096
     1116        4        4        4        0      139      140      280      280     1101     1103      280     1102
     1117        4        4        4        0      137      138      280      280     1097     1100      280     1098
     1118        4        4        4        0      135      280      140      140     1094     1103      140     1093
     1119        4        4        4        0      138      139      280      280     1099     1102      280     1100
     1120        4        4        4        0      135      136      280      280     1092     1096      280     1094
-1
eblock,10,,,6
(15i9)
     1121        3        3        3        0      136      137      280      280     1095     1098      280     1096
     1122        3        3        3        0      139      140      280      280     1101     1103      280     1102
     1123        3        3        3        0      137      138      280      280     1097     1100      280     1098
     1124        3        3        3        0      135      280      140      140     1094     1103      140     1093
     1125        3        3        3        0      138      139      280      280     1099     1102      280     1100
     1126        3        3        3        0      135      136      280      280     1092     1096      280     1094
-1
eblock,10,,,3
(15i9)
     1127        3        4        3        0       14        1       10        9       18       16       34       35
     1128        3        4        3        0       13       12        1       14       38       17       18       39
     1129        3        4        3        0       11       10        1       12       36       16       17       37
-1
eblock,10,,,3
(15i9)
     1130        4        3        4        0       14        1       10        9       18       16       34       35
     1131        4        3        4        0       13       12        1       14       38       17       18       39
     1132        4        3        4        0       11       10        1       12       36       16       17       37
-1
keyo,cid,8,2               ! auto create asymmetric contact (from Program Controlled setting)
keyo,cid,10,0              ! adjust contact stiffness each NR iteration (from Program Controlled setting)
keyo,cid,12,5              ! bonded always
keyo,cid,18,1              ! small sliding turned on by application
keyo,cid,2,0               ! augmented Lagrange (from Program Controlled setting)
keyo,cid,4,0               ! on Gauss point (from Program Controlled setting)
keyo,cid,9,1               ! ignore initial gaps/penetration
keyo,cid,7,0               ! No Prediction
rmod,tid,3,10.      ! FKN
rmod,tid,5,0.       ! ICONT
rmod,tid,6,0.       ! PINB
rmod,tid,10,0.      ! CNOF
rmod,tid,12,0.      ! FKT
rmod,tid,36,146     ! WB DSID
rmod,cid,3,10.      ! FKN
rmod,cid,5,0.       ! ICONT
rmod,cid,6,0.       ! PINB
rmod,cid,10,0.      ! CNOF
rmod,cid,12,0.      ! FKT
rmod,cid,36,146     ! WB DSID
nsel,all
esel,all
/com,*********** Fixed Supports ***********
CMBLOCK,_FIXEDSU,NODE,       16
(8i10)
         2         3         4         5         6         7         8        19
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
cmsel,s,_FIXEDSU
d,all,all
nsel,all
/com,*********** Define Pressure Using Surface Effect Elements ***********
et,5,154
eblock,10,,,15
(15i9)
     1133        5        5        5        0      146      145       43       43     1126      392       43      393
     1134        5        5        5        0      141      145      143      143     1105     1118      143     1104
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-1
esel,s,type,,5
esel,all
esel,all
fini
/com,****************************************************************************
/com,*************************    SOLUTION       ********************************
/com,****************************************************************************
/solu
antype,0                   ! static analysis
eqsl,sparse,,,,,1
cntr,print,1               ! print out contact info and also make no initial contact an error
dmpoption,emat,no             ! Don't combine emat file for DANSYS
dmpoption,esav,no             ! Don't combine esav file for DANSYS
nldiag,cont,iter           ! print out contact info each equilibrium iteration
rescontrol,,none                 ! Do not keep any restart files
/com,****************************************************
/com,******************* SOLVE FOR LS 1 OF 1 ****************
esel,s,type,,5
nsle
sf,all,pres,10000.
nsel,all
esel,all
esel,all
nsub,1,1,1
time,2.
outres,erase
outres,all,none
outres,nsol,all,
outres,rsol,all
outres,strs,all,
outres,epel,all,
outres,eppl,all,
stabilize,off                   ! Stabilization turned OFF by user
! *********** WB SOLVE COMMAND ***********
! check interactive state
*get,ANSINTER_,active,,int
*if,ANSINTER_,ne,0,then
/eof
*endif
solve
/com *************** Write FE CONNECTORS *********
CEWRITE,file,ce,,INTE
/com,****************************************************
/com,*************** FINISHED SOLVE FOR LS 1 *************
/post1
fini
